Main.ModelSetup.TrialSpecificData =
{
  // This sets the path to where the C3D file is stored
  #path MOCAP_C3D_DATA_PATH "../Input/"

  // This is the name of the trial c3d file without extension
  TrialFileName = "GaitNormal_1";


  // The following settings define the initial posture of the
  // model (e.g. at load time)
  AutoPelvisPos AutoPos(RASIS=RASI, LASIS=LASI, BACK=RPSI) = {};


};
