Main.EnvironmentModel.ForcePlates =
{

  ForcePlateType4AutoDetection Plate1(
    No=0,
    HeightTolerance = 0.07,
    VelThreshold = 2.2)
  ={ };

  ForcePlateType4AutoDetection Plate2(
    No=1,
    HeightTolerance = 0.07,
    VelThreshold = 2.2)
  ={ };

  ForcePlateType4AutoDetection Plate3 (
    No=2,
    HeightTolerance = 0.07,
    VelThreshold = 2.2)
  ={ };

};
