//This file creates the environment around the human
AnyFolder EnvironmentModel = {

  AnyFixedRefFrame GlobalRef ={
    Origin={0,0,0};
    AnyDrawRefFrame drw={ScaleXYZ=0.2*{1,1,1};};
  };

  AnyFolder &ForcePlates = Main.ModelSetup.LabSpecificData.ForcePlates;

};
