Main = {

//  AnyOperationMacro RunParameterIdentification  =
//  {
//  MacroStr = {"operation Main.ModelSetup.Views.SetViewMacros.KinematicView",
//              "run",
//              "operation Main.Studies.ParameterIdentification.ParameterOptimization",
//              "run",
//              "operation Main.ModelSetup.Macros.Save_parameters",
//              "run"};
//  };
//
#if MOCAP_CREATE_PARAMETER_ID_SHORTCUT
AnyOperationSequence RunParameterIdentification =
  {
    AnyOperationSequence ParameterIdentification =
    {
      AnyOperationDummy placeholder_operation= {};
    };
    AnyOperationSequence SaveParameters =
    {
      AnyOperationDummy placeholder_operation= {};
    };

  };
#endif

  AnyOperationSequence RunAnalysis= {

    AnyOperationSequence LoadParameters =
    {
      AnyOperationDummy placeholder_operation= {};
    };

    AnyOperationSequence KinematicAnalysis =
    {
      //Hackworkaround. Should be moved the preoperation when pre-op bug is fixed
//      AnyOperation &SetView = Main.ModelSetup.Views.SetViewMacros.KinematicView;
      AnyOperationDummy placeholder_operation= {};
    };

    AnyOperationSequence InverseDynamics =
    {
      //Hackworkaround. Should be moved the preoperation when pre-op bug is fixed
//      AnyOperation &SetInverseDynamicView = Main.ModelSetup.Views.SetViewMacros.InverseDynamicView;
      AnyOperationDummy placeholder_operation= {};
    };
    AnyOperationSequence SaveOuput =
    {
      AnyOperation& SaveHDF5= Main.ModelSetup.Macros.SaveOutputToHDF;
    };
  };

  AnyOperationSequence LoadAndReplay=
  {
      AnyOperation& LoadHDF5= Main.ModelSetup.Macros.LoadOutputFromHDF;
      AnyOperation& Replay= Main.Studies.InverseDynamicStudy.Replay;
  };
};
