//# Defintions for the python test framwork
//define = [
//  {'BM_LEG_MODEL':'_LEG_MODEL_TLEM1_'},
//  {'BM_LEG_MODEL':'_LEG_MODEL_TLEM2_'},
//]
//ignore_errors = ['FileReader.FileName']

#ifndef TEST_NAME
#path AMMR_PATH "C:\Users\mel\Documents\AMMRs\ammr"
#endif

#path TEMP_PATH "../Examples/Plug-in-gait_Squat_StandingRefScaling/Output"
#path MOCAP_PATH_MAINFILEDIR "../Examples/Plug-in-gait_Squat_StandingRefScaling/Trials/FlywheelSquat_1/"
#path MOCAP_PATH_MAINFILE "<MOCAP_PATH_MAINFILEDIR>/Main.any"
#define MOCAP_NAME_MAINFILEDIR "FlywheelSquat_1"


#include "libdef.any"


#ifdef TEST_NAME
#define  MOCAP_TEST_FILENAME_PREFIX  TEST_NAME + "_"
#else
#define  MOCAP_TEST_FILENAME_PREFIX  "GUI_"
#define BM_LEG_MODEL _LEG_MODEL_TLEM2_
#endif


// Run Analysis with a reduced number of time steps
// to make test go faster.
#define N_STEP 30


#include "<MOCAP_PATH_MAINFILE>"

Main =
{

  AnyOperation& RunTest = Main.RunParameterIdentification;

};
